*Heading
** Job name: Job-BeamHex Model name: Model-1
** Generated by: Abaqus/CAE 6.14-1
*Preprint, echo=NO, model=NO, history=NO, contact=NO
**
** PARTS
**
*Part, name=Part-1
*Node
      1,        -100.,         -10.,           5.
      2,        -100.,          -5.,           5.
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*Element, type=C3D20R
  1,  11,  12,  17,  16,   1,   2,   7,   6, 304, 303, 302, 301, 305, 306, 307,
     308, 310, 309, 311, 312
  2,  12,  13,  18,  17,   2,   3,   8,   7, 315, 314, 313, 303, 316, 317, 318,
     306, 309, 319, 320, 311
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*Nset, nset=Set-1, generate
   1,  980,    1
*Elset, elset=Set-1, generate
   1,  116,    1
** Section: Section-1
*Solid Section, elset=Set-1, material=Material-1
,
*End Part
**
**
** ASSEMBLY
**
*Assembly, name=Assembly
**
*Instance, name=Part-1-1, part=Part-1
*End Instance
**
*Nset, nset=Set-1, instance=Part-1-1
   1,   2,   3,   4,   5,   6
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*Elset, elset=Set-1, instance=Part-1-1, generate
 1,  4,  1
*Nset, nset=Set-2, instance=Part-1-1
 291, 292, 293, 294, 295, 296
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*Elset, elset=Set-2, instance=Part-1-1, generate
 113,  116,    1
*Nset, nset=Set-3, instance=Part-1-1
 291, 292, 293, 294, 295, 296
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*Elset, elset=Set-3, instance=Part-1-1, generate
 113,  116,    1
*End Assembly
**
** MATERIALS
**
*Material, name=Material-1
*Density
 1.93e-15,
*Elastic
148000., 0.23
**
** BOUNDARY CONDITIONS
**
** Name: BC-1 Type: Displacement/Rotation
*Boundary
Set-1, 1, 1
Set-1, 2, 2
Set-1, 3, 3
Set-1, 4, 4
Set-1, 5, 5
Set-1, 6, 6
** Name: BC-2 Type: Displacement/Rotation
*Boundary
Set-2, 1, 1
Set-2, 2, 2
Set-2, 4, 4
Set-2, 5, 5
Set-2, 6, 6
** ----------------------------------------------------------------
**
** STEP: Step-1
**
*Step, name=Step-1, nlgeom=NO, perturbation
*Frequency, eigensolver=Lanczos, acoustic coupling=on, normalization=displacement
6, , , , ,
**
** OUTPUT REQUESTS
**
*Restart, write, frequency=0
**
** FIELD OUTPUT: F-Output-1
**
*Output, field, variable=PRESELECT
*End Step
** ----------------------------------------------------------------
**
** STEP: Step-2
**
*Step, name=Step-2, nlgeom=YES
*Static
1., 1., 1e-05, 1.
**
** BOUNDARY CONDITIONS
**
** Name: BC-3 Type: Displacement/Rotation
*Boundary
Set-3, 3, 3, 3.
**
** OUTPUT REQUESTS
**
*Restart, write, frequency=0
**
** FIELD OUTPUT: F-Output-2
**
*Output, field, variable=PRESELECT
**
** HISTORY OUTPUT: H-Output-1
**
*Output, history, variable=PRESELECT
*End Step
** ----------------------------------------------------------------
**
** STEP: Step-3
**
*Step, name=Step-3, nlgeom=NO, perturbation
*Frequency, eigensolver=Lanczos, acoustic coupling=on, normalization=displacement
6, , , , ,
**
** BOUNDARY CONDITIONS
**
** Name: BC-1 Type: Displacement/Rotation
*Boundary, op=NEW
Set-1, 1, 1
Set-1, 2, 2
Set-1, 3, 3
Set-1, 4, 4
Set-1, 5, 5
Set-1, 6, 6
** Name: BC-2 Type: Displacement/Rotation
*Boundary, op=NEW
Set-2, 1, 1
Set-2, 2, 2
Set-2, 4, 4
Set-2, 5, 5
Set-2, 6, 6
** Name: BC-3 Type: Displacement/Rotation
*Boundary, op=NEW
**
** OUTPUT REQUESTS
**
*Restart, write, frequency=0
**
** FIELD OUTPUT: F-Output-1
**
*Output, field, variable=PRESELECT
*End Step
